<Lems>

        <!-- Example with various input currents/spike sources -->

        <!-- This is a file which can be read and executed by the LEMS Interpreter.
             It imports the LEMS definitions of the core NeuroML 2 Components, creates
             a model in "pure" NeuroML 2 and contains some LEMS elements for running
             a simulation -->

<!-- Specify which component to run -->
<Target component="sim1"/>

<!-- Include core NeuroML2 ComponentType definitions -->
<Include file="Cells.xml"/>
<Include file="Networks.xml"/>
<Include file="Inputs.xml"/>
<Include file="Simulation.xml"/>

<adExIaFCell id="adExBurst4"  C="281pF" gL="10nS" EL="-70.6mV"
	     reset="-47.2mV" VT = "-50.4mV" thresh = "-40.4mV"
	     delT="2mV" tauw="40ms"  a ="4nS"   b = "0.08nA"
	     refract="0ms"/>

<expTwoSynapse id="syn1" gbase="1nS" erev="20mV" tauRise="0.1ms" tauDecay="3ms"/>

<expTwoSynapse id="synInput" gbase="10nS" erev="20mV" tauRise="1ms" tauDecay="2ms"/>

<pulseGenerator id="pulseGen0" delay="50ms" duration="200ms" amplitude="0.8 nA" />

<sineGenerator id="sg0" phase="0" delay="50ms" duration="200ms" amplitude="1.2nA" period="50ms"/>

<rampGenerator id="rg0" delay="50ms" duration="200ms" startAmplitude="0.5nA" finishAmplitude="2nA" baselineAmplitude="0nA"/>

<voltageClamp id="vClamp0" delay="50ms" duration="200ms"
	      targetVoltage="-50mV" simpleSeriesResistance="1e6ohm"/>

<spikeArray id="spkArr">
  <spike id="0" time="100 ms"/>
  <spike id="1" time="130 ms"/>
</spikeArray>

<spikeGenerator id="spikeGen" period="20 ms"/>

<spikeGeneratorRandom id="spikeGenRandom" minISI="10 ms"
		      maxISI="30 ms"/>

<spikeGeneratorPoisson id="spikeGenPoisson" averageRate="50 Hz"/>

<poissonFiringSynapse id="poissonFiringSyn" averageRate="50 Hz" synapse="synInput" spikeTarget="./synInput"/>

<network id="net1">
    <population id="adExPop" component="adExBurst4" size="9"/>

    <population id="spikeArrPop" component="spkArr" size="1"/>
    <population id="spikeGenPop" component="spikeGen" size="1"/>
    <population id="spikeGenRandomPop" component="spikeGenRandom" size="1"/>
    <population id="spikeGenPoissonPop" component="spikeGenPoisson" size="1"/>

    <explicitInput target="adExPop[0]" input="pulseGen0" destination="synapses"/>
    <explicitInput target="adExPop[1]" input="sg0" destination="synapses"/>
    <explicitInput target="adExPop[2]" input="rg0" destination="synapses"/>
    <explicitInput target="adExPop[3]" input="vClamp0" destination="synapses"/>
    <explicitInput target="adExPop[8]" input="poissonFiringSyn" destination="synapses"/>

    <synapticConnection from="spikeArrPop[0]" to="adExPop[4]" synapse="syn1" destination="synapses"/>
    <synapticConnection from="spikeGenPop[0]" to="adExPop[5]" synapse="syn1" destination="synapses"/>
    <synapticConnection from="spikeGenRandomPop[0]" to="adExPop[6]" synapse="syn1" destination="synapses"/>
    <synapticConnection from="spikeGenPoissonPop[0]" to="adExPop[7]" synapse="syn1" destination="synapses"/>
</network>

        <!-- End of NeuroML2 content -->

<Simulation id="sim1" length="300ms" step="0.02ms" target="net1">

    <Display id="d0" title="Ex16: Adaptive exponential cell, current clamp input" timeScale="1ms" xmin="-20" xmax="320" ymin="-80" ymax="20">
        <Line id ="adEx0 v" quantity="adExPop[0]/v" scale="1mV"  color="#ee40FF" timeScale="1ms"/>
        <Line id ="current clamp i" quantity="adExPop[0]/pulseGen0/i" scale="0.1nA"  color="#333333" timeScale="1ms"/>
    </Display>
    <Display id="d1" title="Ex16: Adaptive exponential cell, sine wave input" timeScale="1ms" xmin="-20" xmax="320" ymin="-120" ymax="25">
        <Line id ="adEx1 v" quantity="adExPop[1]/v" scale="1mV"  color="#ee40FF" timeScale="1ms"/>
        <Line id ="sine wave i" quantity="adExPop[1]/sg0/i" scale="0.1nA"  color="#333333" timeScale="1ms"/>
    </Display>
    <Display id="d2" title="Ex16: Adaptive exponential cell, ramp current input" timeScale="1ms" xmin="-20" xmax="320" ymin="-110" ymax="30">
        <Line id ="adEx2 v" quantity="adExPop[2]/v" scale="1mV"  color="#ee40FF" timeScale="1ms"/>
        <Line id ="ramp current i" quantity="adExPop[2]/rg0/i" scale="0.1nA"  color="#333333" timeScale="1ms"/>
    </Display>
    <Display id="d3" title="Ex16: Adaptive exponential cell, voltage clamp" timeScale="1ms" xmin="-20" xmax="320" ymin="-110" ymax="35">
        <Line id ="adEx3 v" quantity="adExPop[3]/v" scale="1mV"  color="#ee40FF" timeScale="1ms"/>
        <Line id ="voltage clamp i" quantity="adExPop[3]/vClamp0/i" scale="0.1nA"  color="#333333" timeScale="1ms"/>
    </Display>
    <Display id="d4" title="Ex16: Adaptive exponential cell, spiking inputs" timeScale="1ms" xmin="-20" xmax="320" ymin="-74" ymax="-65">
      <Line id="spike array" quantity="adExPop[4]/v" scale="1mV"
	    color="#DBA901" timeScale="1ms"/>
      <Line id="regular spike gen" quantity="adExPop[5]/v" scale="1mV"
	    color="#80FF00" timeScale="1ms"/>
      <Line id="random (uniform) spike gen" quantity="adExPop[6]/v" scale="1mV"
	    color="#01A9DB" timeScale="1ms"/>
      <Line id="poisson spike gen" quantity="adExPop[7]/v" scale="1mV"
	    color="#8000FF" timeScale="1ms"/>
    </Display>
    <Display id="d5" title="Ex16: Adaptive exponential cell, poison firing synapse" timeScale="1ms" xmin="-20" xmax="320" ymin="-80" ymax="30">
        <Line id ="adEx8 v" quantity="adExPop[8]/v" scale="1mV"  color="#ee40FF" timeScale="1ms"/>
        <Line id ="poison firing synapse g" quantity="adExPop[8]/poissonFiringSyn/synInput/g" scale="1nS"  color="#eeeeee" timeScale="1ms"/>
        <Line id ="poison firing synapse i" quantity="adExPop[8]/poissonFiringSyn/i" scale="0.1nA"  color="#333333" timeScale="1ms"/>
        <Line id ="poison firing synapse time since" quantity="adExPop[8]/poissonFiringSyn/tsince" scale="1ms"  color="#3fffaa" timeScale="1ms"/>
    </Display>

    <OutputFile id="of0" fileName="results/ex16_g.dat">
        <OutputColumn id="syn1exp_g" quantity="adExPop[8]/poissonFiringSyn/synInput/g" />
    </OutputFile>

</Simulation>

</Lems>
