<Lems>

    <!-- Example showing Short Term Plasticity synapse -->

    <!-- This is a file which can be read and executed by the LEMS Interpreter.
         It imports the LEMS definitions of the core NeuroML 2 Components, creates
         a model in "pure" NeuroML 2 and contains some LEMS elements for running
         a simulation -->

    <Target component="sim1"/>

    <Include file="NeuroMLCoreDimensions.xml"/>
    <Include file="Cells.xml"/>
    <Include file="Networks.xml"/>
    <Include file="Simulation.xml"/>

    <!-- Including file with a <neuroml> root, a "real" NeuroML 2 file -->
    <!-- Note: components defined in this can be reused, but we don't use the network here (net1) for simulation,
         We use the one defined below! -->
    <Include file="../examples/NML2_SingleCompHHCell.nml"/>

    <!-- NeuroML 2 elements... -->

    <spikeGenerator id="spikeGen55ms" period="30ms" />

    <abstractCell id="passiveCell" type="pointCellCondBased" C="10pF"  v0="-55mV" thresh="20mV">
        <channelPopulation id="leak" ionChannel="passive" number="300" erev="-55mV"/>
    </abstractCell>

    <expTwoSynapse id="noStpSyn" gbase="1nS" erev="0mV" tauRise="0.1ms" tauDecay="40ms"/>

    <blockingPlasticSynapse id="stpSynDep" gbase="1nS" erev="0mV" tauRise="0.1ms" tauDecay="40ms">
            <plasticityMechanism type="tsodyksMarkramDepMechanism" initReleaseProb = "0.5" tauRec = "300 ms"/>
    </blockingPlasticSynapse>

    <blockingPlasticSynapse id="stpSynDepFac" gbase="1nS" erev="0mV" tauRise="0.1ms" tauDecay="40ms">
            <plasticityMechanism type="tsodyksMarkramDepFacMechanism" initReleaseProb = "0.5" tauFac = "200 ms" tauRec = "300 ms"/>
    </blockingPlasticSynapse>

    <network id="net2">
        <population id="srcPop" component="spikeGen55ms" size="1"/>
        <population id="pasPop" component="passiveCell" size="5"/>
        <synapticConnection from="srcPop[0]" to="pasPop[0]" synapse="noStpSyn" destination="synapses"/>
        <synapticConnection from="srcPop[0]" to="pasPop[1]" synapse="stpSynDep" destination="synapses"/>
        <synapticConnection from="srcPop[0]" to="pasPop[2]" synapse="stpSynDepFac" destination="synapses"/>
    </network>

   <!-- End of NeuroML 2 elements... -->

    <Simulation id="sim1" length="300ms" step="0.01ms" target="net2">
        <Display id="d1" title="Ex7: Cells with STP synapse: voltage" timeScale="1ms" xmin="0" xmax="300" ymin="-56" ymax="-35">
                <Line id="noStp" quantity="pasPop[0]/v" scale="1mV" color="#000000" timeScale="1ms"/>
                <Line id="stpSynDep" quantity="pasPop[1]/v" scale="1mV" color="#0000FF" timeScale="1ms"/>
                <Line id="stpSynDepFac" quantity="pasPop[2]/v" scale="1mV" color="#ff0000" timeScale="1ms"/>
        </Display>

        <Display id="d2" title="Ex7: Cells with STP synapse: synaptic conductances" timeScale="1ms" xmin="0" xmax="300" ymin="-0.1" ymax="2.0">
                <Line id ="noStp" quantity="pasPop[0]/noStpSyn/g" scale="1nS"  color="#000000" timeScale="1ms"/>
                <Line id ="stpSynDep" quantity="pasPop[1]/stpSynDep/g" scale="1nS"  color="#0000FF" timeScale="1ms"/>
                <Line id ="stpSynDepFac" quantity="pasPop[2]/stpSynDepFac/g" scale="1nS"  color="#ff0000" timeScale="1ms"/>
        </Display>

        <Display id="d4" title="Ex7: Cells with STP synapse: scaling variables" timeScale="1ms" xmin="0" xmax="300" ymin="-0.1" ymax="1.1">
                <Line id ="Dep_R" quantity="pasPop[1]/stpSynDep/plasticityMechanism/R" scale="1"  color="#00ffff" timeScale="1ms"/>
                <Line id ="Dep_U" quantity="pasPop[1]/stpSynDep/plasticityMechanism/U" scale="1"  color="#0000ff" timeScale="1ms"/>
                <Line id ="DepFac_R" quantity="pasPop[2]/stpSynDepFac/plasticityMechanism/R" scale="1"  color="#ffffff" timeScale="1ms"/>
                <Line id ="DepFac_U" quantity="pasPop[2]/stpSynDepFac/plasticityMechanism/U" scale="1"  color="#0055ff" timeScale="1ms"/>
        </Display>
    </Simulation>

</Lems>
