<Lems xmlns="http://www.neuroml.org/lems/0.7.5"
      xmlns:xsi="http://www.w3.org/2001/XMLSchema-instance"
      xsi:schemaLocation="http://www.neuroml.org/lems/0.7.5 ../../LEMS/Schemas/LEMS/LEMS_v0.7.5.xsd"
      description="Specification of the LEMS Simulation element which is normally used to define simulations of NeuroML2 files. Note: not actually part of NeuroML v2, but this is required by much of the NeuroML toolchain for defining Simulations (which NeuroML model to use and how long to run for), as well as what to _Display_ and what to save in _OutputFile_s.">

    <!-- A number of Simulation types for use in NeuroML 2 documents  -->

    <!-- Including standard unit definitions for NeuroML v2.0 -->

    <Include file="NeuroMLCoreDimensions.xml"/>

    <ComponentType name="Simulation" description="The main element in a LEMS Simulation file. Defines the _length of simulation, the timestep (dt) _step and an optional _seed to use for stochastic elements, as well as _displays, _outputs and _events to record.">
        <Parameter name="length" dimension="time" description="Duration of the simulation run"/>
        <Parameter name="step" dimension="time"/>

        <Children name="displays" type="Display"/>
        <Children name="outputs" type="OutputFile"/>
        <Children name="events" type="EventOutputFile"/>

        <ComponentReference name="target" type="Component"/>

        <Text name="seed"/>

        <Dynamics>
            <StateVariable name="t" dimension="time"/>
        </Dynamics>

        <Simulation>
            <Run component="target" variable="t" increment="step" total="length"/>
        </Simulation>
    </ComponentType>

    <ComponentType name="Display">
        <Parameter name="xmin" dimension="none"/>
        <Parameter name="xmax" dimension="none"/>
        <Parameter name="ymin" dimension="none"/>
        <Parameter name="ymax" dimension="none"/>
        <Parameter name="timeScale" dimension="time"/>

        <Children name="lines" type="Line"/>

        <Text name="title"/>

        <Simulation>
            <DataDisplay title="title" dataRegion="xmin,xmax,ymin,ymax"/>
        </Simulation>
    </ComponentType>

    <ComponentType name="Line">
        <Parameter name="scale" dimension="*"/>
        <Parameter name="timeScale" dimension="*"/>
        <Path name="quantity"/>
        <Text name="color"/>
        <Simulation>
            <Record quantity="quantity" timeScale="timeScale" scale="scale" color="color"/>
        </Simulation>
    </ComponentType>

    <ComponentType name="OutputFile">

    	<Children name="outputColumn" type="OutputColumn"/>

        <Text name="path"/>
        <Text name="fileName"/>

    	<Simulation>
    		<DataWriter path="path" fileName="fileName"/>
    	</Simulation>

    </ComponentType>

    <ComponentType name="OutputColumn">
        <Path name="quantity"/>
        <Simulation>
            <Record quantity="quantity"/>
        </Simulation>
    </ComponentType>

    <ComponentType name="EventOutputFile">

        <Children name="eventSelection" type="EventSelection"/>

        <Text name="path"/>
        <Text name="fileName"/>
        <Text name="format"/>

        <Simulation>
            <EventWriter path="path" fileName="fileName" format="format"/>
        </Simulation>

    </ComponentType>

    <ComponentType name="EventSelection">
        <Path name="select"/>
        <Text name="eventPort"/>
        <Simulation>
            <EventRecord quantity="select" eventPort="eventPort"/>
        </Simulation>
    </ComponentType>

</Lems>
